*Heading
** Job name: RRX_MNA Model name: Model-1
*Preprint, echo=NO, model=NO, history=NO, contact=NO
**
** PARTS
**
*Part, name=Part-1
*End Part
**
**
** ASSEMBLY
**
*Assembly, name=Assembly
**
*Instance, name=Part-1-1, part=Part-1
*Node
      1,        1000.,         144.,           0.
      2,       -1000.,         144.,           0.
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*Element, type=S4R
   1,    1,    9,  519,  244
   2,    9,   10,  520,  519
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*Nset, nset=Set-1, generate
    1,  6161,     1
*Elset, elset=Set-1, generate
    1,  6000,     1
** Section: Section-1
*Shell Section, elset=Set-1, material=Material-1
1., 5
*End Instance
**
*Nset, nset=Set-1, instance=Part-1-1
   1,   2,   3,   4,   5,   6
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*Elset, elset=Set-1, instance=Part-1-1
    1,  100,  101,  200,  201,  300
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*Nset, nset=Set-2, instance=Part-1-1
   7,   8, 401, 402, 403, 404
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*Elset, elset=Set-2, instance=Part-1-1, generate
 5901,  6000,     1
*Nset, nset=Set-3, instance=Part-1-1
   5,   6, 264, 265, 266, 267
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*Elset, elset=Set-3, instance=Part-1-1, generate
 3901,  4000,     1
*Elset, elset=_Surf-1_E3, internal, instance=Part-1-1, generate
 3901,  4000,     1
*Surface, type=ELEMENT, name=Surf-1
_Surf-1_E3, E3
*Elset, elset=_Surf-2_SPOS, internal, instance=Part-1-1, generate
    1,  6000,     1
*Surface, type=ELEMENT, name=Surf-2
_Surf-2_SPOS, SPOS
*Nset, nset=_T-CylSYS, internal
Set-2,
Set-3,
Set-1,
*Transform, nset=_T-CylSYS, type=C
          0.,           0.,           0.,           0.,           1.,           0.
*NSET, NSET=RIKS, INSTANCE=Part-1-1
6
*End Assembly
**
** MATERIALS
**
*Material, name=Material-1
*Elastic
200000., 0.3
*PLASTIC
250., 0.0
**
** BOUNDARY CONDITIONS
**
** Name: BC1r Type: Displacement/Rotation
*Boundary
Set-2, 1, 1
Set-2, 2, 2
Set-2, 3, 3
Set-2, 5, 5
** Name: BC2f Type: Displacement/Rotation
*Boundary
Set-3, 1, 1
Set-3, 2, 2
** Name: Sym Type: Symmetry/Antisymmetry/Encastre
*Boundary
Set-1, YSYMM
** ----------------------------------------------------------------
**
** STEP: MNA
**
*Step, name=MNA, nlgeom=NO, inc=300
*Static, riks
0.03, 1., 1e-15, 0.03, ,
**
** LOADS
**
** Name: N   Type: Shell edge load
*Dsload
Surf-1, EDNOR, 250.
**
** OUTPUT REQUESTS
**
*Restart, write, frequency=0
**
** FIELD OUTPUT: F-Output-1
**
*Output, field, variable=PRESELECT
**
** HISTORY OUTPUT: H-Output-1
**
*Output, history
*NODE OUTPUT, NSET=RIKS
U2
*End Step
